<?xml version="1.0"?>
<!--
  gnc_trainer: a ~11 kg, 2.9 m span fixed-wing UAS for the JSBSim GNC curriculum.
  GENERATED by modules/07_build_uas_model/solutions/build_gnc_trainer.py - edit the
  generator, not this file.

  Data: Aerosonde-class parameters from Beard & McLain, "Small Unmanned Aircraft:
  Theory and Practice" (Princeton, 2012), as published in mavsim_public.
  Structural frame: origin at the propeller hub, x aft, y right, z up.
-->
<fdm_config name="gnc_trainer" version="2.0" release="BETA">

  <fileheader>
    <author> JSBSim GNC Lab (generated) </author>
    <description> Small fixed-wing UAS, Aerosonde-class (Beard &amp; McLain) </description>
    <reference refID="BM2012" author="R. Beard, T. McLain" title="Small Unmanned Aircraft: Theory and Practice" date="2012"/>
  </fileheader>

  <metrics>
    <wingarea unit="M2"> 0.55 </wingarea>
    <wingspan unit="M"> 2.8956 </wingspan>
    <chord unit="M"> 0.18994 </chord>
    <location name="AERORP" unit="M"> <x> 0.4 </x> <y> 0 </y> <z> 0 </z> </location>
    <location name="VRP" unit="M"> <x> 0.4 </x> <y> 0 </y> <z> 0 </z> </location>
  </metrics>

  <!-- negated_crossproduct_inertia="false": ixz = +integral(x z dm), the
       textbook (Beard & McLain) definition.  JSBSim's default ("true") expects
       the opposite sign - a classic source of wrong roll/yaw coupling. -->
  <mass_balance negated_crossproduct_inertia="false">
    <ixx unit="KG*M2"> 0.8244 </ixx>
    <iyy unit="KG*M2"> 1.135 </iyy>
    <izz unit="KG*M2"> 1.759 </izz>
    <ixz unit="KG*M2"> 0.1204 </ixz>
    <emptywt unit="KG"> 11.0 </emptywt>
    <location name="CG" unit="M"> <x> 0.4 </x> <y> 0 </y> <z> 0 </z> </location>
    <pointmass name="PAYLOAD">
      <description> Movable payload/ballast for CG and weight dispersions (default 0) </description>
      <weight unit="KG"> 0.0 </weight>
      <location unit="M"> <x> 0.4 </x> <y> 0 </y> <z> 0 </z> </location>
    </pointmass>
  </mass_balance>

  <ground_reactions>
    <!-- Belly-landing skids; the vehicle is air-launched in all lessons. -->
    <contact type="STRUCTURE" name="NOSE_SKID">
      <location unit="M"> <x> 0.10 </x> <y> 0 </y> <z> -0.12 </z> </location>
      <static_friction> 0.6 </static_friction> <dynamic_friction> 0.5 </dynamic_friction>
      <spring_coeff unit="N/M"> 8000 </spring_coeff> <damping_coeff unit="N/M/SEC"> 300 </damping_coeff>
    </contact>
    <contact type="STRUCTURE" name="TAIL_SKID">
      <location unit="M"> <x> 1.60 </x> <y> 0 </y> <z> -0.05 </z> </location>
      <static_friction> 0.6 </static_friction> <dynamic_friction> 0.5 </dynamic_friction>
      <spring_coeff unit="N/M"> 4000 </spring_coeff> <damping_coeff unit="N/M/SEC"> 150 </damping_coeff>
    </contact>
    <contact type="STRUCTURE" name="LEFT_TIP">
      <location unit="M"> <x> 0.45 </x> <y> -1.448 </y> <z> 0.05 </z> </location>
      <static_friction> 0.6 </static_friction> <dynamic_friction> 0.5 </dynamic_friction>
      <spring_coeff unit="N/M"> 4000 </spring_coeff> <damping_coeff unit="N/M/SEC"> 150 </damping_coeff>
    </contact>
    <contact type="STRUCTURE" name="RIGHT_TIP">
      <location unit="M"> <x> 0.45 </x> <y> 1.448 </y> <z> 0.05 </z> </location>
      <static_friction> 0.6 </static_friction> <dynamic_friction> 0.5 </dynamic_friction>
      <spring_coeff unit="N/M"> 4000 </spring_coeff> <damping_coeff unit="N/M/SEC"> 150 </damping_coeff>
    </contact>
  </ground_reactions>

  <!-- Placeholder engine: produces nothing, but gives JSBSim's trim routine a
       throttle (fcs/throttle-cmd-norm) to adjust.  Real thrust is below. -->
  <propulsion>
    <engine file="gnc_dummy_motor">
      <feed> 0 </feed>
      <thruster file="gnc_direct">
        <location unit="M"> <x> 0.0 </x> <y> 0 </y> <z> 0 </z> </location>
        <orient unit="DEG"> <roll> 0 </roll> <pitch> 0 </pitch> <yaw> 0 </yaw> </orient>
      </thruster>
    </engine>
    <tank type="FUEL">
      <location unit="M"> <x> 0.4 </x> <y> 0 </y> <z> 0 </z> </location>
      <capacity unit="KG"> 0.001 </capacity>
      <contents unit="KG"> 0.001 </contents>
    </tank>
  </propulsion>

  <!-- Thrust along the shaft and the motor reaction torque on the airframe. -->
  <external_reactions>
    <force name="propeller" frame="BODY">
      <function> <product> <property> propulsion/thrust-N </property> <property> uncertainty/thrust-scale </property> <value> 0.224809 </value> </product> </function>
      <location unit="M"> <x> 0.0 </x> <y> 0 </y> <z> 0 </z> </location>
      <direction> <x> 1 </x> <y> 0 </y> <z> 0 </z> </direction>
    </force>
    <moment name="prop_torque" frame="BODY">
      <function> <product> <property> propulsion/torque-Nm </property> <value> 0.737562 </value> </product> </function>
      <direction> <x> -1 </x> <y> 0 </y> <z> 0 </z> </direction>
    </moment>
  </external_reactions>

  <!-- ===== Avionics, executed in this order every frame =====
       (JSBSim runs ALL <system>s, in file order, before <flight_control>.)
       1. Systems/gnc_sensors.xml : sensor models; publishes fb/... feedback signals
       2. fcs/gnc_autopilot.xml   : autopilot + guidance; publishes ap/...-cmd-norm
       3. motor-prop system        : throttle sum + propulsion
       4. <flight_control>         : pilot + trim + autopilot commands -> actuators -> surfaces
       gnclab points JSBSim's systems path at aircraft/gnc_trainer/fcs/; pass
       make_fdm(..., systems_dir=...) to fly your own gnc_autopilot.xml instead. -->
  <system name="interfaces">
    <!-- Interface properties shared by the files below, declared once here. -->
    <property value="0"> fcs/actuators-on </property>
    <property value="0"> ap/elevator-cmd-norm </property>
    <property value="0"> ap/aileron-cmd-norm </property>
    <property value="0"> ap/rudder-cmd-norm </property>
    <property value="0"> ap/throttle-cmd-norm </property>
    <!-- Actuator parameters, properties so a Monte Carlo can disperse them. -->
    <property value="40.0"> fcs/actuator-bw-rad_sec </property>
    <property value="4.3633"> fcs/actuator-rate-rad_sec </property>
    <!-- Aero/propulsion uncertainty multipliers (1 = nominal), Module 15. -->
    <property value="1"> uncertainty/CL-scale </property>  <!-- lift curve -->
    <property value="1"> uncertainty/CD-scale </property>  <!-- drag -->
    <property value="1"> uncertainty/Cma-scale </property>  <!-- pitch stiffness -->
    <property value="1"> uncertainty/Cmq-scale </property>  <!-- pitch damping -->
    <property value="1"> uncertainty/Cmde-scale </property>  <!-- elevator power -->
    <property value="1"> uncertainty/Clb-scale </property>  <!-- dihedral effect -->
    <property value="1"> uncertainty/Clp-scale </property>  <!-- roll damping -->
    <property value="1"> uncertainty/Clda-scale </property>  <!-- aileron power -->
    <property value="1"> uncertainty/Cnb-scale </property>  <!-- weathercock stability -->
    <property value="1"> uncertainty/Cnr-scale </property>  <!-- yaw damping -->
    <property value="1"> uncertainty/thrust-scale </property>  <!-- propeller thrust -->
  </system>
  <system file="gnc_sensors"/>
  <system file="gnc_autopilot"/>

  <!-- ===== Motor + propeller (Beard & McLain propulsion addendum) ===== -->
  <system name="motor-prop">
    <channel name="Propulsion">
      <!-- pilot/trim throttle (fcs/throttle-pos-norm) + autopilot throttle -->
      <summer name="fcs/throttle-total-norm">
        <input> fcs/throttle-pos-norm </input>
        <input> ap/throttle-cmd-norm </input>
        <clipto> <min> 0 </min> <max> 1 </max> </clipto>
      </summer>
      <fcs_function name="propulsion/rho-kgm3">
        <function> <product> <property> atmosphere/rho-slugs_ft3 </property> <value> 515.379 </value> </product> </function>
      </fcs_function>
      <fcs_function name="propulsion/Va-mps">
        <function> <product> <property> velocities/u-aero-fps </property> <value> 0.3048 </value> </product> </function>
      </fcs_function>
      <!-- quadratic in Omega: a, b, c -->
      <fcs_function name="propulsion/a">
        <function> <product> <property> propulsion/rho-kgm3 </property>  <value> 4.481883e-06 </value> </product> </function>
      </fcs_function>
      <fcs_function name="propulsion/b">
        <function> <sum> <product> <property> propulsion/rho-kgm3 </property> <property> propulsion/Va-mps </property> <value> 5.2678254e-05 </value> </product> <value> 0.10326603 </value> </sum> </function>
      </fcs_function>
      <fcs_function name="propulsion/c">
        <function>
          <sum>
            <product> <property> propulsion/rho-kgm3 </property> <property> propulsion/Va-mps </property>
                      <property> propulsion/Va-mps </property> <value> -0.002181446 </value> </product>
            <product> <property> fcs/throttle-total-norm </property> <value> -69.620487 </value> </product>
            <value> 0.098785827 </value>
          </sum>
        </function>
      </fcs_function>
      <fcs_function name="propulsion/omega-rad_sec">
        <description> Omega = (-b + sqrt(b^2 - 4ac)) / 2a, floored at 0 </description>
        <function>
          <max>
            <value> 0 </value>
            <quotient>
              <difference>
                <pow>
                  <max> <value> 0 </value>
                    <difference>
                      <product> <property> propulsion/b </property> <property> propulsion/b </property> </product>
                      <product> <value> 4 </value> <property> propulsion/a </property> <property> propulsion/c </property> </product>
                    </difference>
                  </max>
                  <value> 0.5 </value>
                </pow>
                <property> propulsion/b </property>
              </difference>
              <product> <value> 2 </value> <property> propulsion/a </property> </product>
            </quotient>
          </max>
        </function>
      </fcs_function>
      <fcs_function name="propulsion/thrust-N">
        <function>
          <product> <property> propulsion/rho-kgm3 </property>
            <sum>
              <product> <property> propulsion/omega-rad_sec </property> <property> propulsion/omega-rad_sec </property> <value> 0.00015784533 </value> </product>
              <product> <property> propulsion/omega-rad_sec </property> <property> propulsion/Va-mps </property> <value> -0.0012610599 </value> </product>
              <product> <property> propulsion/Va-mps </property> <property> propulsion/Va-mps </property> <value> -0.027845106 </value> </product>
            </sum>
          </product>
        </function>
      </fcs_function>
      <fcs_function name="propulsion/torque-Nm">
        <function>
          <product> <property> propulsion/rho-kgm3 </property>
            <sum>
              <product> <property> propulsion/omega-rad_sec </property> <property> propulsion/omega-rad_sec </property> <value> 4.481883e-06 </value> </product>
              <product> <property> propulsion/omega-rad_sec </property> <property> propulsion/Va-mps </property> <value> 5.2678254e-05 </value> </product>
              <product> <property> propulsion/Va-mps </property> <property> propulsion/Va-mps </property> <value> -0.002181446 </value> </product>
            </sum>
          </product>
        </function>
      </fcs_function>
      <fcs_function name="propulsion/rpm">
        <function> <product> <property> propulsion/omega-rad_sec </property> <value> 9.5492966 </value> </product> </function>
      </fcs_function>
      <fcs_function name="propulsion/current-A">
        <function>
          <quotient>
            <difference>
              <product> <property> fcs/throttle-total-norm </property> <value> 44.4 </value> </product>
              <product> <property> propulsion/omega-rad_sec </property> <value> 0.065857218 </value> </product>
            </difference>
            <value> 0.042 </value>
          </quotient>
        </function>
      </fcs_function>
    </channel>
  </system>

  <flight_control name="gnc_trainer FCS">
    <!-- Normalized commands (-1..1, throttle 0..1) -> surface angles [rad].
         Pilot, trim and autopilot (ap/...) commands are summed.  Trim inputs
         must be included so JSBSim's trim routine can use them. -->
    <channel name="Pitch">
      <summer name="fcs/elevator-sum">
        <input> fcs/elevator-cmd-norm </input>
        <input> fcs/pitch-trim-cmd-norm </input>
        <input> ap/elevator-cmd-norm </input>
        <clipto> <min> -1 </min> <max> 1 </max> </clipto>
      </summer>
      <aerosurface_scale name="fcs/elevator-cmd-rad">
        <input> fcs/elevator-sum </input>
        <range> <min> -0.43633 </min> <max> 0.43633 </max> </range>
      </aerosurface_scale>
      <!-- Actuator model: first-order lag + rate limit + travel limit. -->
      <actuator name="fcs/elevator-actuator">
        <input> fcs/elevator-cmd-rad </input>
        <lag> fcs/actuator-bw-rad_sec </lag>
        <rate_limit> fcs/actuator-rate-rad_sec </rate_limit>
        <clipto> <min> -0.43633 </min> <max> 0.43633 </max> </clipto>
      </actuator>
      <!-- fcs/actuators-on = 0 (default): ideal surfaces (needed for
           finite-difference linearization).  1: realistic actuators. -->
      <switch name="fcs/elevator-pos-select">
        <default value="fcs/elevator-cmd-rad"/>
        <test value="fcs/elevator-actuator"> fcs/actuators-on == 1 </test>
        <output> fcs/elevator-pos-rad </output>
      </switch>
    </channel>
    <channel name="Roll">
      <summer name="fcs/aileron-sum">
        <input> fcs/aileron-cmd-norm </input>
        <input> fcs/roll-trim-cmd-norm </input>
        <input> ap/aileron-cmd-norm </input>
        <clipto> <min> -1 </min> <max> 1 </max> </clipto>
      </summer>
      <aerosurface_scale name="fcs/aileron-cmd-rad">
        <input> fcs/aileron-sum </input>
        <range> <min> -0.43633 </min> <max> 0.43633 </max> </range>
      </aerosurface_scale>
      <!-- Actuator model: first-order lag + rate limit + travel limit. -->
      <actuator name="fcs/aileron-actuator">
        <input> fcs/aileron-cmd-rad </input>
        <lag> fcs/actuator-bw-rad_sec </lag>
        <rate_limit> fcs/actuator-rate-rad_sec </rate_limit>
        <clipto> <min> -0.43633 </min> <max> 0.43633 </max> </clipto>
      </actuator>
      <!-- fcs/actuators-on = 0 (default): ideal surfaces (needed for
           finite-difference linearization).  1: realistic actuators. -->
      <switch name="fcs/aileron-pos-select">
        <default value="fcs/aileron-cmd-rad"/>
        <test value="fcs/aileron-actuator"> fcs/actuators-on == 1 </test>
        <output> fcs/aileron-pos-rad </output>
      </switch>
    </channel>
    <channel name="Yaw">
      <summer name="fcs/rudder-sum">
        <input> fcs/rudder-cmd-norm </input>
        <input> fcs/yaw-trim-cmd-norm </input>
        <input> ap/rudder-cmd-norm </input>
        <clipto> <min> -1 </min> <max> 1 </max> </clipto>
      </summer>
      <aerosurface_scale name="fcs/rudder-cmd-rad">
        <input> fcs/rudder-sum </input>
        <range> <min> -0.43633 </min> <max> 0.43633 </max> </range>
      </aerosurface_scale>
      <!-- Actuator model: first-order lag + rate limit + travel limit. -->
      <actuator name="fcs/rudder-actuator">
        <input> fcs/rudder-cmd-rad </input>
        <lag> fcs/actuator-bw-rad_sec </lag>
        <rate_limit> fcs/actuator-rate-rad_sec </rate_limit>
        <clipto> <min> -0.43633 </min> <max> 0.43633 </max> </clipto>
      </actuator>
      <!-- fcs/actuators-on = 0 (default): ideal surfaces (needed for
           finite-difference linearization).  1: realistic actuators. -->
      <switch name="fcs/rudder-pos-select">
        <default value="fcs/rudder-cmd-rad"/>
        <test value="fcs/rudder-actuator"> fcs/actuators-on == 1 </test>
        <output> fcs/rudder-pos-rad </output>
      </switch>
    </channel>
  </flight_control>

  <aerodynamics>
    <!-- All coefficients are referenced to the CG (AERORP = CG).  Forces in the
         wind frame (DRAG, SIDE, LIFT), moments in the body frame. -->

    <axis name="LIFT">
      <function name="aero/force/L_alpha">
        <description> CL(alpha) with stall: linear CL0 + CLa*alpha blended to flat plate (B&amp;M eq. 4.9) </description>
        <product>
          <property> aero/qbar-psf </property>
          <property> metrics/Sw-sqft </property>
          <property> uncertainty/CL-scale </property>
          <table>
            <independentVar lookup="row"> aero/alpha-rad </independentVar>
            <tableData>
                -1.5708   -0.00000
                -1.0472   -0.75000
                -0.6981   -0.63306
                -0.5236   -0.57895
                -0.4189   -1.98900
                -0.3840   -1.90184
                -0.3491   -1.72470
                -0.3142   -1.53188
                -0.2793   -1.33652
                -0.2443   -1.14077
                -0.2094   -0.94495
                -0.1745   -0.74913
                -0.1396   -0.55330
                -0.1047   -0.35748
                -0.0698   -0.16165
                -0.0349    0.03417
                 0.0000    0.23000
                 0.0349    0.42583
                 0.0698    0.62165
                 0.1047    0.81748
                 0.1396    1.01330
                 0.1745    1.20913
                 0.2094    1.40495
                 0.2443    1.60076
                 0.2793    1.79649
                 0.3142    1.99169
                 0.3491    2.18361
                 0.3840    2.35569
                 0.4189    2.41587
                 0.5236    0.60847
                 0.6981    0.63306
                 1.0472    0.75000
                 1.5708    0.00000
            </tableData>
          </table>
        </product>
      </function>
      <function name="aero/force/L_q">
        <description> CLq = 7.95 </description>
        <product>
          <property> aero/qbar-psf </property>
          <property> metrics/Sw-sqft </property>
          <property> aero/ci2vel </property>
          <property> velocities/q-aero-rad_sec </property>
          <value> 7.95 </value>
        </product>
      </function>
      <function name="aero/force/L_de">
        <description> CLde = 0.13 </description>
        <product>
          <property> aero/qbar-psf </property>
          <property> metrics/Sw-sqft </property>
          <property> fcs/elevator-pos-rad </property>
          <value> 0.13 </value>
        </product>
      </function>
    </axis>

    <axis name="DRAG">
      <function name="aero/force/D_alpha">
        <description> CD(alpha) = CDp + (CL0 + CLa*alpha)^2/(pi e AR)  (B&amp;M eq. 4.11) </description>
        <product>
          <property> aero/qbar-psf </property>
          <property> metrics/Sw-sqft </property>
          <property> uncertainty/CD-scale </property>
          <table>
            <independentVar lookup="row"> aero/alpha-rad </independentVar>
            <tableData>
                -1.5708    1.75178
                -1.0472    0.78224
                -0.6981    0.35830
                -0.5236    0.21306
                -0.4189    0.14726
                -0.3840    0.12889
                -0.3491    0.11230
                -0.3142    0.09748
                -0.2793    0.08445
                -0.2443    0.07319
                -0.2094    0.06372
                -0.1745    0.05602
                -0.1396    0.05010
                -0.1047    0.04596
                -0.0698    0.04361
                -0.0349    0.04303
                 0.0000    0.04423
                 0.0349    0.04721
                 0.0698    0.05197
                 0.1047    0.05850
                 0.1396    0.06682
                 0.1745    0.07692
                 0.2094    0.08880
                 0.2443    0.10245
                 0.2793    0.11789
                 0.3142    0.13510
                 0.3491    0.15409
                 0.3840    0.17487
                 0.4189    0.19742
                 0.5236    0.27575
                 0.6981    0.44190
                 1.0472    0.90764
                 1.5708    1.93987
            </tableData>
          </table>
        </product>
      </function>
      <function name="aero/force/D_de">
        <description> CDde = 0.0135 * |delta_e| (the book's term is signed; ours is not) </description>
        <product>
          <property> aero/qbar-psf </property> <property> metrics/Sw-sqft </property>
          <abs> <property> fcs/elevator-pos-rad </property> </abs>
          <value> 0.0135 </value>
        </product>
      </function>
    </axis>

    <axis name="SIDE">
      <function name="aero/force/Y_beta">
        <description> CYb = -0.98 </description>
        <product>
          <property> aero/qbar-psf </property>
          <property> metrics/Sw-sqft </property>
          <property> aero/beta-rad </property>
          <value> -0.98 </value>
        </product>
      </function>
      <function name="aero/force/Y_da">
        <description> CYda = 0.075 </description>
        <product>
          <property> aero/qbar-psf </property>
          <property> metrics/Sw-sqft </property>
          <property> fcs/aileron-pos-rad </property>
          <value> 0.075 </value>
        </product>
      </function>
      <function name="aero/force/Y_dr">
        <description> CYdr = 0.19 </description>
        <product>
          <property> aero/qbar-psf </property>
          <property> metrics/Sw-sqft </property>
          <property> fcs/rudder-pos-rad </property>
          <value> 0.19 </value>
        </product>
      </function>
    </axis>

    <axis name="PITCH">
      <function name="aero/moment/Cm0">
        <description> Cm0 = 0.0135 </description>
        <product> <property> aero/qbar-psf </property> <property> metrics/Sw-sqft </property>
                  <property> metrics/cbarw-ft </property> <value> 0.0135 </value> </product>
      </function>
      <function name="aero/moment/Cm_alpha">
        <description> Cma = -2.74 </description>
        <product>
          <property> aero/qbar-psf </property>
          <property> metrics/Sw-sqft </property>
          <property> metrics/cbarw-ft </property>
          <property> aero/alpha-rad </property>
          <property> uncertainty/Cma-scale </property>
          <value> -2.74 </value>
        </product>
      </function>
      <function name="aero/moment/Cm_q">
        <description> Cmq = -38.21 </description>
        <product>
          <property> aero/qbar-psf </property>
          <property> metrics/Sw-sqft </property>
          <property> metrics/cbarw-ft </property>
          <property> aero/ci2vel </property>
          <property> velocities/q-aero-rad_sec </property>
          <property> uncertainty/Cmq-scale </property>
          <value> -38.21 </value>
        </product>
      </function>
      <function name="aero/moment/Cm_de">
        <description> Cmde = -0.99 </description>
        <product>
          <property> aero/qbar-psf </property>
          <property> metrics/Sw-sqft </property>
          <property> metrics/cbarw-ft </property>
          <property> fcs/elevator-pos-rad </property>
          <property> uncertainty/Cmde-scale </property>
          <value> -0.99 </value>
        </product>
      </function>
    </axis>

    <axis name="ROLL">
      <function name="aero/moment/Cl_beta">
        <description> Clb = -0.13 </description>
        <product>
          <property> aero/qbar-psf </property>
          <property> metrics/Sw-sqft </property>
          <property> metrics/bw-ft </property>
          <property> aero/beta-rad </property>
          <property> uncertainty/Clb-scale </property>
          <value> -0.13 </value>
        </product>
      </function>
      <function name="aero/moment/Cl_p">
        <description> Clp = -0.51 </description>
        <product>
          <property> aero/qbar-psf </property>
          <property> metrics/Sw-sqft </property>
          <property> metrics/bw-ft </property>
          <property> aero/bi2vel </property>
          <property> velocities/p-aero-rad_sec </property>
          <property> uncertainty/Clp-scale </property>
          <value> -0.51 </value>
        </product>
      </function>
      <function name="aero/moment/Cl_r">
        <description> Clr = 0.25 </description>
        <product>
          <property> aero/qbar-psf </property>
          <property> metrics/Sw-sqft </property>
          <property> metrics/bw-ft </property>
          <property> aero/bi2vel </property>
          <property> velocities/r-aero-rad_sec </property>
          <value> 0.25 </value>
        </product>
      </function>
      <function name="aero/moment/Cl_da">
        <description> Clda = 0.17 </description>
        <product>
          <property> aero/qbar-psf </property>
          <property> metrics/Sw-sqft </property>
          <property> metrics/bw-ft </property>
          <property> fcs/aileron-pos-rad </property>
          <property> uncertainty/Clda-scale </property>
          <value> 0.17 </value>
        </product>
      </function>
      <function name="aero/moment/Cl_dr">
        <description> Cldr = 0.0024 </description>
        <product>
          <property> aero/qbar-psf </property>
          <property> metrics/Sw-sqft </property>
          <property> metrics/bw-ft </property>
          <property> fcs/rudder-pos-rad </property>
          <value> 0.0024 </value>
        </product>
      </function>
    </axis>

    <axis name="YAW">
      <function name="aero/moment/Cn_beta">
        <description> Cnb = 0.073 </description>
        <product>
          <property> aero/qbar-psf </property>
          <property> metrics/Sw-sqft </property>
          <property> metrics/bw-ft </property>
          <property> aero/beta-rad </property>
          <property> uncertainty/Cnb-scale </property>
          <value> 0.073 </value>
        </product>
      </function>
      <function name="aero/moment/Cn_p">
        <description> Cnp = 0.069 </description>
        <product>
          <property> aero/qbar-psf </property>
          <property> metrics/Sw-sqft </property>
          <property> metrics/bw-ft </property>
          <property> aero/bi2vel </property>
          <property> velocities/p-aero-rad_sec </property>
          <value> 0.069 </value>
        </product>
      </function>
      <function name="aero/moment/Cn_r">
        <description> Cnr = -0.095 </description>
        <product>
          <property> aero/qbar-psf </property>
          <property> metrics/Sw-sqft </property>
          <property> metrics/bw-ft </property>
          <property> aero/bi2vel </property>
          <property> velocities/r-aero-rad_sec </property>
          <property> uncertainty/Cnr-scale </property>
          <value> -0.095 </value>
        </product>
      </function>
      <function name="aero/moment/Cn_da">
        <description> Cnda = -0.011 </description>
        <product>
          <property> aero/qbar-psf </property>
          <property> metrics/Sw-sqft </property>
          <property> metrics/bw-ft </property>
          <property> fcs/aileron-pos-rad </property>
          <value> -0.011 </value>
        </product>
      </function>
      <function name="aero/moment/Cn_dr">
        <description> Cndr = -0.069 </description>
        <product>
          <property> aero/qbar-psf </property>
          <property> metrics/Sw-sqft </property>
          <property> metrics/bw-ft </property>
          <property> fcs/rudder-pos-rad </property>
          <value> -0.069 </value>
        </product>
      </function>
    </axis>
  </aerodynamics>

</fdm_config>
